A := [1; 1]
B := [2; 3]
L := [0; 0]
R := [2; 0]
AB := B - A = [1; 2]
[x_AB; y_AB] := AB
M := AB/2 + A = [1.5; 2]
r := [-y_AB; x_AB] = [-2; 1]
l(t) := M + t*r
LR := R - L
[a; b] := LR
[c; d] := R - M
t := det([a, c; b, d])/det([a, -y_AB; b, x_AB]) = -2
C := l(t) = [5.5; 0]
